// SBML level 3 version 2
// Created with https://github.com/matthiaskoenig/sbmlutils.

model debug_model()
  // Debug Model
  // model units - substance: substance, time: time, volume: volume

  // Compartments:
  compartment Cytoplasm = 5.25e-12 volume;  // GO:0005737
  compartment Extracellular = 8e-8 volume;  // GO:0005576
  compartment Nucleus = 1.75e-12 volume;  // GO:0005634
  compartment Mitochondria = 3.675e-13 volume;  // GO:0005739

  // Species:
  species ext_comp__palbociclib_ in Extracellular = 0;
  species cyt_comp_in__palbociclib_ in Cytoplasm = 0;
  species nuc_comp_in__palbociclib_ in Nucleus = 0;
  species nuc_cong__CCND__CDK4__palbociclib_ in Nucleus = 0;
  species nuc_cong__CCND__CDK4_ in Nucleus = 0;

  // Parameters:
  kPal1_1 = 0.01;
  kPal2_1 = 0.01;
  kPal3_1 = 0.01;
  kPal4_1 = 0.1;
  kPal5_1 = 0.001;
  kPal6_1 = 0.0019;
  kPal7_1 = 0.00236;

  // Reactions:
  vPal1: ext_comp__palbociclib_ => cyt_comp_in__palbociclib_; kPal1_1*(Cytoplasm/Extracellular)*ext_comp__palbociclib_*Extracellular;
  vPal2: cyt_comp_in__palbociclib_ => ext_comp__palbociclib_; kPal2_1*Cytoplasm;
  vPal3: cyt_comp_in__palbociclib_ => nuc_comp_in__palbociclib_; kPal3_1*(Nucleus/Cytoplasm)*cyt_comp_in__palbociclib_*Cytoplasm;
  vPal4: nuc_comp_in__palbociclib_ => cyt_comp_in__palbociclib_; kPal4_1*Nucleus;
  vPal5: nuc_comp_in__palbociclib_ + nuc_cong__CCND__CDK4_ => nuc_cong__CCND__CDK4__palbociclib_; kPal5_1*Nucleus;
  vPal6: nuc_cong__CCND__CDK4__palbociclib_ => nuc_comp_in__palbociclib_ + nuc_cong__CCND__CDK4_; kPal6_1*Nucleus;
  vPal7: nuc_cong__CCND__CDK4__palbociclib_ => ; kPal7_1*Nucleus;

  // Unit definitions:
  unit nM = 1e-9 mole / litre; nM is "nanomole/litre";
  unit substance = 1e-9 mole; substance is "nanomole";
  unit time = second; time is "second";
  unit volume = litre; volume is "litre";
end
